# Распределение Вейбулла
# 1. Плотность распределения
f(t, b, c) := b/c*(t/c)^(b - 1)*e^(-(t/c)^b)
t := 0, 1 .. 30
# [plot: f(t, 0.5, 10), f(t, 1, 10), f(t, 3, 10), f(t, 5, 10) vs t]
# [plot: f(t, 5, 10), f(t, 5, 20), f(t, 5, 30) vs t]
# 2. Функция распределения
F(t, b, c) := 1 - e^(-(t/c)^b)
# [plot: F(t, 0.5, 10), F(t, 1, 10), F(t, 3, 10), F(t, 5, 10) vs t]
# [plot: F(t, 5, 10), F(t, 5, 20), F(t, 5, 30) vs t]
# 3. Начальные моменты
a_1(b, c) := integral(t*f(t, b, c), t = 0 .. 100)
a_2(b, c) := integral(t^2*f(t, b, c), t = 0 .. 100)
a_3(b, c) := integral(t^3*f(t, b, c), t = 0 .. 100)
# 4. Математическое ожидание
M_1(b, c) := a_1(b, c)
M_1(3, 10) = 8.9298
d_1 := 0, 1 .. 30
m_t(b, c) := c*Γ(1 + 1/b)
m_t(3, 10) = 8.9298
# [plot: M_1(d_1, 10), m_t(d_1, 10) vs d_1]
# [plot: M_1(3, d_1), m_t(3, d_1) vs d_1]
# 5. Мода
Mo(t, b, c) := root(d/dt(f(t, b, c)), t, 3, 10)
Mo(0, 3, 10) = 8.73581
# [plot: f(t, 3, 10), f(Mo(t, 3, 10), 3, 10) vs t, Mo(t, 3, 10)]
# 6. Медиана
Me(t, b, c) := root(F(t, 3, 10) - 1/2, t, 3, 10)
Me(0, 3, 10) = 8.84997
# 7. Дисперсия
D_1(b, c) := a_2(b, c) - a_1(b, c)^2
D_1(3, 10) = 10.5333
D_2(b, c) := c^2*(Γ(1 + 2/b) - Γ(1 + 1/b)^2)
D_2(3, 10) = 10.5333
# [plot: D_1(d_1, 10), D_2(d_1, 10) vs d_1]
# [plot: D_1(3, d_1), D_2(3, d_1) vs d_1]
# 8. Среднеквадратичное отклонение
σ(b, c) := sqrt(D_1(b, c))
σ(3, 10) = 3.2455
# 9. Коэффициент асиметрии
μ_3(b, c) := 2*a_1(b, c)^3 - 3*a_1(b, c)*a_2(b, c) + a_3(b, c)
S(b, c) := μ_3(b, c)/σ(b, c)
# [plot: S(d_1, 10), S(3, d_1) vs d_1]
